// COMSOL Multiphysics 6.2.0.290 model "comb.mph"
// Outline of the model tree

Parameters
  xmax = 21.85[um]
  xmin = -xmax
  ymax = 4.0[um]
  ymin = -ymax
  Vdc = 10[V]

Selections
  box1: Box "fix1" | entitydim = 2; xmin = xmax-0.1; xmax = xmax+0.1; condition = inside
  box2: Box "fix2" | entitydim = 2; xmin = xmin-0.1; xmax = xmin+0.1; condition = inside
  box3: Box "period1" | entitydim = 2; ymin = ymax-0.1; ymax = ymax+0.1; condition = inside
  box4: Box "period2" | entitydim = 2; ymin = ymin-0.1; ymax = ymin+0.1; condition = inside
  ball1: Ball "move finger" | entitydim = 3; r = 0.1
  ball2: Ball "fix finger" | entitydim = 3; posx = xmin; r = 0.1
  uni1: Union | entitydim = 2; input = {box3, box4}
  uni2: Union "Period" | entitydim = 2; input = {box3, box4}

Geometry
  geom1 "Geometry 1" (3D, length unit µm)
    imp1: Import
      type = ecad
      filename = C:\Users\Sim\Desktop\NOEMS_Layout\simulation\combdrive_tuning\comb_array_period.gds
      ecadtype = gds
      fileunit = µm
      layername = LAYER1
      layerprop = {LAYER1, Metal}
      height = 5
      elevation = 0
      importlayer = on
    blk1: Block | pos = {0, 0, 2.5}; base = center; size = {xmax-xmin, ymax-ymin, 5}
    fin: Finalize "Form Union"

Materials
  mat2: Common "Air" on all domains
    def "Basic"
      thermalexpansioncoefficient = alpha_p(pA,T)
      molarmass = 0.02897[kg/mol]
      bulkviscosity = muB(T)
      relpermeability = 1
      relpermittivity = 1
      dynamicviscosity = eta(T)
      ratioofspecificheat = 1.4
      electricconductivity = 0[S/m]
      heatcapacity = Cp(T)
      density = rho(pA,T)
      thermalconductivity = k(T)
      soundspeed = cs(T)
      eta: Piecewise | arg = T; pieces = {200.0, 1600.0, -8.38278E-7+8.35717342E-8*T^1-7.69429583E-11*T^2+4.6437266E-14*T^3-1.06585607E-17*T^4}; argunit = K; fununit = Pa*s
      Cp: Piecewise | arg = T; pieces = {200.0, 1600.0, 1047.63657-0.372589265*T^1+9.45304214E-4*T^2-6.02409443E-7*T^3+1.2858961E-10*T^4}; argunit = K; fununit = J/(kg*K)
      rho: Analytic | expr = pA*0.02897/R_const[K*mol/J]/T; args = {pA, T}; fununit = kg/m^3; argunit = {Pa, K}
      k: Piecewise | arg = T; pieces = {200.0, 1600.0, -0.00227583562+1.15480022E-4*T^1-7.90252856E-8*T^2+4.11702505E-11*T^3-7.43864331E-15*T^4}; argunit = K; fununit = W/(m*K)
      cs: Analytic | expr = sqrt(1.4*R_const[K*mol/J]/0.02897*T); args = T; fununit = m/s; argunit = K
      an1: Analytic | funcname = alpha_p; expr = -1/rho(pA,T)*d(rho(pA,T),T); args = {pA, T}; fununit = 1/K; argunit = {Pa, K}
      an2: Analytic "Analytic 2a" | funcname = muB; expr = 0.6*eta(T); args = T; fununit = Pa*s; argunit = K
    RefractiveIndex
      n = 1
      ki = 0
    NonlinearModel
      BA = def.gamma-1
    idealGas
      Rs = R_const/Mn
      heatcapacity = Cp(T)
      ratioofspecificheat = 1.4
      molarmass = 0.02897
      Cp: Piecewise | arg = T; pieces = {200.0, 1600.0, 1047.63657-0.372589265*T^1+9.45304214E-4*T^2-6.02409443E-7*T^3+1.2858961E-10*T^4}; argunit = K; fununit = J/(kg*K)
  mat1: Common "Silicon" on selection geom1_imp1_LAYER1_dom
    def "Basic"
      relpermeability = 1
      electricconductivity = 1e-12[S/m]
      thermalexpansioncoefficient = 2.6e-6[1/K]
      heatcapacity = 700[J/(kg*K)]
      relpermittivity = 11.7
      density = 2329[kg/m^3]
      thermalconductivity = 130[W/(m*K)]
    Enu "Young's modulus and Poisson's ratio"
      E = 170[GPa]
      nu = 0.28
    RefractiveIndex
      n = 3.48
      ki = 0

Physics
  es: Electrostatics on all domains
    dependent variable V
    ccn1: ChargeConservation (default)
    zc1: ZeroCharge (default)
    init1: init "Initial Values 1" (default)
    term1: DomainTerminal "Terminal 1" on selection ball2 | TerminalType = Voltage; V0 = 0
    term2: DomainTerminal "Terminal 2" on selection ball1 | TerminalType = Voltage; V0 = Vdc
    pc1: PeriodicCondition on selection uni2 | destinationDomains: boundaries 5, 24, 28
    fcal1: ForceCalculation on selection ball1 | ForceName = FF

Mesh
  mesh1 "Mesh 1" (physics-controlled)
    size: MeshSizeDefault | hauto = 1

Studies
  std1 "Study 1"
    stat: Stationary

Solver configurations
  sol1 "Solution 1" (study std1)
    v1: Variables "Dependent Variables 1"
    s1: Stationary "Stationary Solver 1"
      fc1: FullyCoupled
      i1: Iterative | linsolver = cg
        mg1: Multigrid | prefun = amg; coarseningmethod = classic

Datasets
  dset1: Solution | solution = sol1

Derived values
  gev1: EvalGlobal "Global Evaluation 1"
    data = dset1
    table = tbl1
    expr = es.Forcex_FF
    unit = N
    descr = Electromagnetic force, x-component

Tables
  tbl1: Table
    // Global Evaluation 1
    Vdc (V) | Electromagnetic force, x-component (N)
    1 | -2.18933e-11
    2 | -8.75731e-11
    3 | -1.9704e-10
    4 | -3.50293e-10
    5 | -5.47332e-10
    6 | -7.88158e-10
    7 | -1.07277e-09
    8 | -1.40117e-09
    9 | -1.77336e-09
    10 | -2.18933e-09
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
Plots
  pg1: PlotGroup3D "Electric Potential (es)" | data = dset1
    mslc1: Multislice
      expr = V
      multiplanexmethod = coord
      xcoord = es.CPx
      multiplaneymethod = coord
      ycoord = es.CPy
      multiplanezmethod = coord
      zcoord = es.CPz
    strmsl1: StreamlineMultislice
      expr = {es.Ex, es.Ey, es.Ez}
      multiplanexmethod = coord
      xcoord = es.CPx
      multiplaneymethod = coord
      ycoord = es.CPy
      multiplanezmethod = coord
      zcoord = es.CPz
      udist = 0.02
      col1: Color "Color Expression 1" | expr = V
      filt1: Filter | expr = !isScalingSystemDomain
  pg2: PlotGroup3D "Electric Field Norm (es)" | data = dset1
    mslc1: Multislice
      expr = es.normE
      multiplanexmethod = coord
      xcoord = es.CPx
      multiplaneymethod = coord
      ycoord = es.CPy
      multiplanezmethod = coord
      zcoord = es.CPz
    strmsl1: StreamlineMultislice
      expr = {es.Ex, es.Ey, es.Ez}
      multiplanexmethod = coord
      xcoord = es.CPx
      multiplaneymethod = coord
      ycoord = es.CPy
      multiplanezmethod = coord
      zcoord = es.CPz
      udist = 0.02
      col1: Color "Color Expression 1" | expr = es.normE
      filt1: Filter | expr = !isScalingSystemDomain