// COMSOL Multiphysics 6.2.0.290 model "folded_spring.mph"
// Outline of the model tree

Parameters
  e1.x = -9.0[um]
  e1.y = 55.0[um]
  e2.x = 23.0[um]
  e2.y = 70.0[um]
  e3.x = 55.0[um]
  e3.y = 55.0[um]

Variables
  var1 "Variables 1"
    kxx = with(1,intop1(solid.RFx) )/0.1[um]
    kzz = with(2,intop1(solid.RFz) )/0.1[um]

Selections
  ball1: Ball "fix1" | entitydim = 2; posx = e1.x; posy = e1.y; posz = 2.5; r = 1
  ball2: Ball "move" | entitydim = 2; posx = e2.x; posy = e2.y; posz = 2.5; r = 1
  ball3: Ball "fix 2" | entitydim = 2; posx = e3.x; posy = e3.y; posz = 2.5; r = 1
  uni1: Union | entitydim = 2; input = {ball1, ball3}

Couplings
  intop1: Integration on selection ball2 | method = summation

Load and constraint groups
  lg1 "Load Group 1"
  lg2 "Load Group 2"

Geometry
  geom1 "Geometry 1" (3D, length unit µm)
    imp1: Import
      type = ecad
      filename = c:\Users\Sim\Desktop\NOEMS_Layout\simulation\combdrive_tuning\folded_spring_gds\spring_L40_W1_S15.gds
      ecadtype = gds
      fileunit = µm
      celltree = {UNNAMED_1556, RECTANGLE_GDSFACTORYPCOMPONENTSPSHAPESPRECTANGLE_S40_1__084E35BA, UNNAMED_1556, RECTANGLE_GDSFACTORYPCOMPONENTSPSHAPESPRECTANGLE_S10_10_5B17C449, UNNAMED_1556, PERFORATED_SHAFT_W16_H20_HS5_20_M5_RFTRUE_BM1_CMFALSE_MO5, UNNAMED_1556, UNNAMED_1559, UNNAMED_1556, PERFORATED_SHAFT_W46_H10_HS20_5_M5_RFTRUE_BM0_CMFALSE_MO5}
      layername = {LAYER1, LAYER3}
      layerprop = {{LAYER1, Metal}, {LAYER3, Metal}}
      height = {5, 0}
      elevation = {0, 0}
      importlayer = {on, off}
    fin: Finalize "Form Union"

Materials
  mat1: Common "Silicon" on all domains
    def "Basic"
      relpermeability = 1
      electricconductivity = 1e-12[S/m]
      thermalexpansioncoefficient = 2.6e-6[1/K]
      heatcapacity = 700[J/(kg*K)]
      relpermittivity = 11.7
      density = 2329[kg/m^3]
      thermalconductivity = 130[W/(m*K)]
    Enu "Young's modulus and Poisson's ratio"
      E = 170[GPa]
      nu = 0.28
    RefractiveIndex
      n = 3.48
      ki = 0

Physics
  solid: SolidMechanics on all domains
    dependent variable u = {u, v, w}
    lemm1: LinearElasticModel "Linear Elastic Material 1" (default)
    free1: Free (default)
    init1: init "Initial Values 1" (default)
    fix1: Fixed "Fixed Constraint 1" on selection uni1
    rig1: RigidConnector on selection ball2
      Direction = {1, 0, 1}
      U0 = {if(root.group.lg1,0.1[um]*root.group.lg1,0), 0, if(root.group.lg2,0.1[um]*root.group.lg2,0)}
      RotationType = PrescribedRotationGroup

Mesh
  mesh1 "Mesh 1" (physics-controlled)
    size: MeshSizeDefault | hauto = 1

Studies
  std1 "Study 1"
    stat: Stationary
      geometricNonlinearity = on
      useloadcase = on
      loadcase = {Load case 1, Load case 2}
      loadgroup = {{on, off}, {off, on}}
      loadgroupweight = {{1.0, 1.0}, {1.0, 1.0}}

Solver configurations
  sol1 "Solution 1" (study std1)
    v1: Variables "Dependent Variables 1"
      comp1_u: Field "Displacement field (comp1.u)" | scalemethod = manual; scaleval = 1e-2*9.49789450352e-05
      comp1_solid_rig_disp: State "comp1.solid_rig_disp" | scalemethod = manual; scaleval = 9.49789450352e-07
      comp1_solid_rig_rot: State "comp1.solid_rig_rot" | scalemethod = manual; scaleval = 0.01
    s1: Stationary "Stationary Solver 1"
      p1: Parametric | plooporder = manual; useloadcase = on; loadgroup = {{on, off}, {off, on}}
      fc1: FullyCoupled | linsolver = d1
      d1: Direct "Suggested Direct Solver (solid)" | linsolver = pardiso; pivotperturb = 1.0E-9; nliniterrefine = on

Datasets
  dset1: Solution | solution = sol1

Derived values
  gev1: EvalGlobal "Global Evaluation 1" | data = dset1; table = tbl1; expr = {kxx, kzz}; unit = {N/m, N/m}

Tables
  tbl1: Table
    // Global Evaluation 1
    loadcase | group.lg1 | group.lg2 | kxx (N/m) | kzz (N/m)
    1 | 1 | 0 | 47.977 | 183.517
    2 | 0 | 1 | 47.977 | 183.517

Plots
  pg1: PlotGroup3D "Stress (solid)" | data = dset1
    vol1: Volume | expr = solid.disp
      def: Deform "Deformation" | expr = {u, v, w}