// COMSOL Multiphysics 6.2.0.290 model "shaft_beam_shell.mph"
// Outline of the model tree

Parameters
  shaft_w = 602.0[um]
  shaft_h = 30[um]
  xmin = -301.0[um]
  xmax = 301.0[um]
  num_pull = 6
  num_push = 1
  mid = spacing * (num_pull - num_push)/2
  spacing = 70[um]
  l_beam = 1000[um]
  total_force = 1.302e-05[N]

Selections
  ball1: Ball "p1" | posx = 61.8+1; posy = shaft_h/2; r = 1; entitydim = 0
  ball2: Ball "p2" | posx = shaft_w/2; posy = -shaft_h/2; r = 1; entitydim = 0
  box3: Box "spring_source" | entitydim = 3; xmin = xmax-1; xmax = xmax+1; ymin = 0
  dif1: Difference "spring_destination" | entitydim = 3; subtract = {box3}
  box8: Box "comb source1" | entitydim = 3; xmin = mid; xmax = mid+spacing; ymin = shaft_h+10; ymax = inf
  box9: Box "comb source 2" | entitydim = 3; xmin = mid; xmax = mid+spacing; ymin = -inf; ymax = -(shaft_h+10)
  uni2: Union "comb gp1" | entitydim = 3
  uni3: Union "comb gp2" | entitydim = 3
  dif2: Difference "comb dest1" | entitydim = 3; add = {uni2}; subtract = {box8}
  dif3: Difference "comb dest2" | entitydim = 3; add = {uni3}; subtract = {box9}
  box10: Box "comb source1.1"
    entitydim = 2
    xmin = mid
    xmax = mid+spacing
    ymin = 0
    ymax = inf
    zmin = 2.5
    condition = inside
  box11: Box "comb source 2.1"
    entitydim = 2
    xmin = mid
    xmax = mid+spacing
    ymin = -inf
    ymax = 0
    zmin = 2.5
    condition = inside
  uni4: Union "comb pull" | entitydim = 2; input = {box16, box17}
  box14: Box "ne" | entitydim = 2; xmin = mid; xmax = mid+num_push*spacing; ymin = shaft_h+10; ymax = inf
  box15: Box "se" | entitydim = 2; xmin = mid; xmax = mid+num_push*spacing; ymin = -inf; ymax = -(shaft_h+10)
  box16: Box "sw" | entitydim = 2; xmin = mid-num_pull*spacing; xmax = mid; ymin = -inf; ymax = -(shaft_h+10)
  box17: Box "nw" | entitydim = 2; xmin = mid-num_pull*spacing; xmax = mid; ymin = shaft_h+10; ymax = inf
  uni6: Union "comb all" | entitydim = 2; input = {box14, box15, box16, box17}
  adj3: Adjacent "comb pull edges" | entitydim = 2; input = {uni4}; outputdim = 1
  ball3: Ball "shaft_main" | entitydim = 2; r = 5
  box12: Box "fix_nw" | entitydim = 1; xmin = xmax-0.1; xmax = xmax+0.1; ymin = shaft_h/2; condition = inside
  box19: Box "fix_sw" | entitydim = 1; xmin = xmax-0.1; xmax = xmax+0.1; ymax = -shaft_h/2; condition = inside
  box13: Box "fix_ne" | entitydim = 1; xmin = xmin-1; xmax = xmin+1; ymin = shaft_h/2; condition = inside
  box20: Box "fix_se" | entitydim = 1; xmin = xmin-1; xmax = xmin+1; ymax = -shaft_h/2; condition = inside
  uni5: Union "fix" | entitydim = 1; input = {box12, box13, box18, box19, box20}
  adj2: Adjacent "spring" | entitydim = 1; input = {uni5}; outputdim = 2
  uni7: Union "all but beam" | entitydim = 2; input = {uni6, ball3, adj2}
  box18: Box "beam fix" | entitydim = 1; xmin = l_beam+shaft_w/2-1; xmax = l_beam+shaft_w/2+1; condition = inside

Couplings
  intop1: Integration on edges 1335, 1336, 1338 | method = summation

Common definitions
  mpf1: ParticipationFactors

Geometry
  geom1 "Geometry 1" (3D, length unit µm)
    imp1: Import
      type = ecad
      filename = C:\Users\weixi\Desktop\Comsol python\NOEMS_Layout\simulation\combdrive_tuning\shaft_sim.gds
      ecadtype = gds
      fileunit = µm
      layername = LAYER1
      layerprop = {LAYER1, Metal}
      height = 0
      elevation = 0
      importlayer = on
    wp1: WorkPlane | quickplane = zx; quicky = -shaft_h/2; unite = on
    wp2: WorkPlane | quickplane = zx; quicky = +shaft_h/2; unite = on
    wp3: WorkPlane | unite = on
      r1: Rectangle | pos = {shaft_w/2, -50[nm]}; size = {l_beam, 100[nm]}
    parf1: PartitionFaces | face = selection imp1_LAYER1.bnd; partitionwith = workplane; workplane = wp1
    parf2: PartitionFaces | face = selection imp1_LAYER1.bnd; partitionwith = workplane; workplane = wp2
    fin: Finalize "Form Union"

Materials
  mat1: Common "Silicon" on all boundaries
    def "Basic"
      relpermeability = 1
      electricconductivity = 1e-12[S/m]
      thermalexpansioncoefficient = 2.6e-6[1/K]
      heatcapacity = 700[J/(kg*K)]
      relpermittivity = 11.7
      density = 2329[kg/m^3]
      thermalconductivity = 130[W/(m*K)]
    Enu "Young's modulus and Poisson's ratio"
      E = 170[GPa]
      nu = 0.28
    RefractiveIndex
      n = 3.48
      ki = 0

Physics
  shell: Shell on all boundaries
    dependent variable u = {u, v, w}
    emm1: Elastic "Linear Elastic Material 1" (default)
      shls1: ShellLocalSystem (default)
    to1: ThicknessOffset "Thickness and Offset 1" (default) | d = 5[um]
    free1: Free (default)
    init1: init "Initial Values 1" (default)
    fix1: Fixed "Fixed Constraint 1" on selection uni5
    to2: ThicknessOffset "Thickness and Offset 2" on boundaries 20 | d = 500[nm]
    el1: EdgeLoad on selection adj3 | LoadTypeForce = TotalForce; FeTot = {-total_force, 0, 0}

Mesh
  mesh1 "Mesh 1"
    size: MeshSizeDefault | hmax = 15; hmin = 0.01; hcurve = 0.5; hnarrow = 1.5; hauto = 2; custom = on
    ftri1: FreeTri "Free Triangular 1" on all boundaries
    dis1: Distribution on no edges

Studies
  std3 "Study 3"
    stat: Stationary | geometricNonlinearity = on
    eig: Eigenfrequency | neigs = 15; shift = 1[Hz]; geometricNonlinearity = on

Solver configurations
  sol3 "Solution 3" (study std3)
    v1: Variables "Dependent Variables 1"
      comp1_ar: Field "Displacement of shell normals (comp1.ar)" | scalemethod = manual; scaleval = 0.01
    s1: Stationary "Stationary Solver 1"
      dDef: Direct
      fc1: FullyCoupled
    su1: StoreSolution "Solution Store 1"
    v2: Variables "Dependent Variables 2" | initmethod = sol; notsolmethod = sol
      comp1_ar: Field "Displacement of shell normals (comp1.ar)" | scalemethod = manual; scaleval = 0.01
    e1: Eigenvalue "Eigenvalue Solver 1"
      transform = eigenfrequency
      neigs = 15
      shift = 1[Hz]
      linpmethod = sol
      linpsolnum = auto
      storelinpoint = on
      eigvfunscale = maximum
      eigvfunscaleparam = 1.62e-09
      dDef: Direct
  sol4 "Solution Store 1" (study std3)

Datasets
  dset3: Solution | solution = sol3
  dset3shellshl: Shell
    data = dset3
    seplevels = off
    resolution = 2
    areascalefactor = shell.ASF
    linescalefactor = shell.LSF
  dset4: Solution | solution = sol4

Derived values
  gev1: EvalGlobal "Global Evaluation 1" | data = dset3; table = tbl2; expr = kxx; descr = Frequency

Evaluation groups
  std3EvgFrq: EvaluationGroup "Eigenfrequencies (Study 3)" | data = dset3
    gev1: EvalGlobal "Global Evaluation 1"
      expr = {2*pi*freq, imag(freq)/abs(freq), abs(freq)/imag(freq)/2}
      unit = {rad/s, 1, 1}
      descr = {Angular frequency, Damping ratio, Quality factor}
  std3mpf1: EvaluationGroup "Participation Factors (Study 3)" | data = dset3
    gev1: EvalGlobal "Global Evaluation 1"
      expr = {mpf1.pfLnormX, mpf1.pfLnormY, mpf1.pfLnormZ, mpf1.pfRnormX, mpf1.pfRnormY, mpf1.pfRnormZ, mpf1.mEffLX, mpf1.mEffLY, mpf1.mEffLZ, mpf1.mEffRX, mpf1.mEffRY, mpf1.mEffRZ}
      unit = {1, 1, 1, 1, 1, 1, kg, kg, kg, kg*m^2, kg*m^2, kg*m^2}
      descr = {"Participation factor, normalized, X-translation", "Participation factor, normalized, Y-translation", "Participation factor, normalized, Z-translation", "Participation factor, normalized, X-rotation", "Participation factor, normalized, Y-rotation", "Participation factor, normalized, Z-rotation", "Effective modal mass, X-translation", "Effective modal mass, Y-translation", "Effective modal mass, Z-translation", "Effective modal mass, X-rotation", "Effective modal mass, Y-rotation", "Effective modal mass, Z-rotation"}
  std3mpf11: EvaluationGroup "Participation Factors (Study 3) 1" | data = dset3
    gev1: EvalGlobal "Global Evaluation 1"
      expr = {mpf1.pfLnormX, mpf1.pfLnormY, mpf1.pfLnormZ, mpf1.pfRnormX, mpf1.pfRnormY, mpf1.pfRnormZ, mpf1.mEffLX, mpf1.mEffLY, mpf1.mEffLZ, mpf1.mEffRX, mpf1.mEffRY, mpf1.mEffRZ}
      unit = {1, 1, 1, 1, 1, 1, kg, kg, kg, kg*m^2, kg*m^2, kg*m^2}
      descr = {"Participation factor, normalized, X-translation", "Participation factor, normalized, Y-translation", "Participation factor, normalized, Z-translation", "Participation factor, normalized, X-rotation", "Participation factor, normalized, Y-rotation", "Participation factor, normalized, Z-rotation", "Effective modal mass, X-translation", "Effective modal mass, Y-translation", "Effective modal mass, Z-translation", "Effective modal mass, X-rotation", "Effective modal mass, Y-rotation", "Effective modal mass, Z-rotation"}

Tables
  tbl1: Table
    // Global Evaluation 1
    Eigenfrequency (Hz) | Eigenvalue | Frequency (Hz)
    8663.5 | 0-54434.3i | 8663.5
    16871.5 | 0-106007i | 16871.5
    30507.2 | 0-191682i | 30507.2
    32447.7 | 0-203875i | 32447.7
    41665.1 | 0-261790i | 41665.1
    47577.9 | 0-298940i | 47577.9
  tbl2: Table
    // Global Evaluation 1
    Frequency (N/m) | Frequency (N/m)
    -35.9984 | -27.5062

Plots
  pg4: PlotGroup3D "Mode Shape (solid) 1" | data = dset3
    surf2: Surface | expr = shell.disp
      def: Deform "Deformation" | expr = {u, v, w}
  pg5: PlotGroup3D "Static Deformation" | data = dset4
    surf1: Surface | expr = shell.disp
      def: Deform "Deformation" | expr = {shell.u, shell.v, shell.w}; descr = Displacement, 3D
  pg6: PlotGroup3D "Static y" | data = dset4
    surf1: Surface | expr = u
      def: Deform "Deformation" | expr = {shell.u, shell.v, shell.w}; descr = Displacement, 3D

Exports
  img1: Image | sourceobject = pg4; size = manualprint; unit = px; width = 1920; height = 1080