// COMSOL Multiphysics 6.2.0.290 model "spring2.mph"
// Outline of the model tree

Parameters
  xmax = maxop1(x)

Variables
  var1 "Variables 1"
    kxx = with(1,intop1(solid.RFx))/0.1[um]
    kyy = with(2,intop1(solid.RFy))/0.1[um]
    kzz = with(3,intop1(solid.RFz))/0.1[um]

Selections
  box1: Box "move" | entitydim = 2; xmin = 131; xmax = 133; condition = inside
  box2: Box "fix" | entitydim = 2; xmin = 0; xmax = 1; condition = inside

Couplings
  intop1: Integration on selection box1 | method = summation

Load and constraint groups
  lg1 "Load Group 1"
  lg2 "Load Group 2"
  lg3 "Load Group 3"

Geometry
  geom1 "Geometry 1" (3D, length unit µm)
    imp1: Import
      type = ecad
      filename = C:\Users\weixi\Desktop\Comsol python\NOEMS_Layout\layout\spring_5um.gds
      ecadtype = gds
      fileunit = µm
      celltree = {$$$CONTEXT_INFO$$$, SPRING_5UM_SW2_SL20_S15_NL3_MO5}
      layername = {LAYER0, LAYER1, LAYER9}
      layerprop = {{LAYER0, Metal}, {LAYER1, Metal}, {LAYER9, Metal}}
      height = {5, 5, 0}
      elevation = {5, 0, 0}
      importlayer = {off, on, off}
    fin: Finalize "Form Union"

Materials
  mat1: Common "Silicon" on all domains
    def "Basic"
      relpermeability = 1
      electricconductivity = 1e-12[S/m]
      thermalexpansioncoefficient = 2.6e-6[1/K]
      heatcapacity = 700[J/(kg*K)]
      relpermittivity = 11.7
      density = 2329[kg/m^3]
      thermalconductivity = 130[W/(m*K)]
    Enu "Young's modulus and Poisson's ratio"
      E = 170[GPa]
      nu = 0.28
    RefractiveIndex
      n = 3.48
      ki = 0

Physics
  solid: SolidMechanics on all domains
    dependent variable u = {u, v, w}
    lemm1: LinearElasticModel "Linear Elastic Material 1" (default)
    free1: Free (default)
    init1: init "Initial Values 1" (default)
    fix1: Fixed "Fixed Constraint 1" on selection box2
    rig1: RigidConnector on selection box1
      Direction = {1, 1, 1}
      U0 = {if(root.group.lg1, 0.1[um]*root.group.lg1,0), if(root.group.lg2, 0.1[um]*root.group.lg2,0), if(root.group.lg3, 0.1[um]*root.group.lg3,0)}
      RotationType = ConstrainedRotationGroup
      ConstrainedRotation = {1, 1, 1}

Mesh
  mesh1 "Mesh 1"
    size: MeshSizeDefault | hmax = 1.6; hmin = 0.016; hnarrow = 3; hauto = 1; custom = on
    swe1: Sweep "Swept 1" on remaining entities

Studies
  std1 "Study 1"
    stat: Stationary
      useloadcase = on
      loadcase = {Load case 1, Load case 2, Load case 3}
      loadgroup = {{on, off, off}, {off, on, off}, {off, off, on}}
      loadgroupweight = {{1.0, 1.0, 1.0}, {1.0, 1.0, 1.0}, {1.0, 1.0, 1.0}}

Solver configurations
  sol1 "Solution 1" (study std1)
    v1: Variables "Dependent Variables 1"
      comp1_u: Field "Displacement field (comp1.u)" | scalemethod = manual; scaleval = 1e-2*0.000165798069953
      comp1_solid_rig_disp: State "comp1.solid_rig_disp" | scalemethod = manual; scaleval = 1.65798069953e-06
      comp1_solid_rig_rot: State "comp1.solid_rig_rot" | scalemethod = manual; scaleval = 0.01
    s1: Stationary "Stationary Solver 1"
      p1: Parametric | plooporder = manual; useloadcase = on; loadgroup = {{on, off, off}, {off, on, off}, {off, off, on}}
      fc1: FullyCoupled | linsolver = d1
      d1: Direct "Suggested Direct Solver (solid)" | linsolver = pardiso; pivotperturb = 1.0E-9

Datasets
  dset1: Solution | solution = sol1

Derived values
  gev1: EvalGlobal "Global Evaluation 1" | data = dset1; table = tbl2; expr = maxop1(x); descr = Maximum 1

Tables
  tbl1: Table
    // Global Evaluation 1
    loadcase | group.lg1 | group.lg2 | group.lg3 | kxx (N/m) | kyy (N/m) | kzz (N/m)
    1 | 1 | 0 | 0 | 9.45161 | 6.40443 | 6.49579
  tbl2: Table
    // Global Evaluation 1
    loadcase | group.lg1 | group.lg2 | group.lg3 | Maximum 1 (µm)
    1 | 1 | 0 | 0 | 80
    2 | 0 | 1 | 0 | 80
    3 | 0 | 0 | 1 | 80

Plots
  pg1: PlotGroup3D "Stress (solid)" | data = dset1
    vol1: Volume | expr = solid.misesGp
      def: Deform "Deformation" | expr = {u, v, w}